*Heading
** Job name: Job-17 Model name: 3d-beam01
** Generated by: Abaqus/CAE Student Edition 2019
*Preprint, echo=NO, model=NO, history=NO, contact=NO
**
** PARTS
**
*Part, name=BEAM-PART
*Node
      1,  0.200000003,           0.,           0.
      2,  0.300000012,           0.,           0.
      3,  0.400000006,           0.,           0.
      4,          0.5,           0.,           0.
      5,  0.600000024,           0.,           0.
      6,  0.699999988,           0.,           0.
      7,  0.800000012,           0.,           0.
      8,  0.899999976,           0.,           0.
      9,           1.,           0.,           0.
     10,   1.10000002,           0.,           0.
     11,   1.20000005,           0.,           0.
*Element, type=B31
 1,  1,  2
 2,  2,  3
 3,  3,  4
 4,  4,  5
 5,  5,  6
 6,  6,  7
 7,  7,  8
 8,  8,  9
 9,  9, 10
10, 10, 11
*Elset, elset=EL1
 1,
*Elset, elset=EL2
 2,
*Elset, elset=EL3
 3,
*Elset, elset=EL4
 4,
*Elset, elset=EL5
 5,
*Elset, elset=EL6
 6,
*Elset, elset=EL7
 7,
*Elset, elset=EL8
 8,
*Elset, elset=EL9
 9,
*Elset, elset=EL10
 10,
*Nset, nset=NMASS
 11,
*Nset, nset=_PICKEDSET14, internal
 11,
*Nset, nset=_PickedSet15, internal
 11,
** Section: Section-1-EL1  Profile: Profile-1
*Beam General Section, elset=EL1, density=1550., section=GENERAL
5.42e-05, 4.297e-10, 0., 4.297e-10, 1.93e-09
0.,0.,-1.
 1e+11, 7.143e+10,        0.
*Damping, beta=0.01
** Section: Section-2-EL2  Profile: Profile-2
*Beam General Section, elset=EL2, density=1550., section=GENERAL
5.42e-05, 4.297e-10, 0., 4.297e-10, 1.93e-09
0.,0.,-1.
 1e+11, 7.143e+10,        0.
*Damping, beta=0.01
** Section: Section-3-EL3  Profile: Profile-3
*Beam General Section, elset=EL3, density=1550., section=GENERAL
5.42e-05, 4.297e-10, 0., 4.297e-10, 1.93e-09
0.,0.,-1.
 1e+11, 7.143e+10,        0.
*Damping, beta=0.01
** Section: Section-4-EL4  Profile: Profile-4
*Beam General Section, elset=EL4, density=1550., section=GENERAL
5.42e-05, 4.297e-10, 0., 4.297e-10, 1.93e-09
0.,0.,-1.
 1e+11, 7.143e+10,        0.
*Damping, beta=0.01
** Section: Section-5-EL5  Profile: Profile-5
*Beam General Section, elset=EL5, density=1550., section=GENERAL
5.42e-05, 4.297e-10, 0., 4.297e-10, 1.93e-09
0.,0.,-1.
 1e+11, 7.143e+10,        0.
*Damping, beta=0.01
** Section: Section-6-EL6  Profile: Profile-6
*Beam General Section, elset=EL6, density=1550., section=GENERAL
5.42e-05, 4.297e-10, 0., 4.297e-10, 1.93e-09
0.,0.,-1.
 1e+11, 7.143e+10,        0.
*Damping, beta=0.01
** Section: Section-7-EL7  Profile: Profile-7
*Beam General Section, elset=EL7, density=1550., section=GENERAL
5.42e-05, 4.297e-10, 0., 4.297e-10, 1.93e-09
0.,0.,-1.
 1e+11, 7.143e+10,        0.
*Damping, beta=0.01
** Section: Section-8-EL8  Profile: Profile-8
*Beam General Section, elset=EL8, density=1550., section=GENERAL
5.42e-05, 4.297e-10, 0., 4.297e-10, 1.93e-09
0.,0.,-1.
 1e+11, 7.143e+10,        0.
*Damping, beta=0.01
** Section: Section-9-EL9  Profile: Profile-9
*Beam General Section, elset=EL9, density=1550., section=GENERAL
5.42e-05, 4.297e-10, 0., 4.297e-10, 1.93e-09
0.,0.,-1.
 1e+11, 7.143e+10,        0.
*Damping, beta=0.01
** Section: Section-10-EL10  Profile: Profile-10
*Beam General Section, elset=EL10, density=1550., section=GENERAL
5.42e-05, 4.297e-10, 0., 4.297e-10, 1.93e-09
0.,0.,-1.
 1e+11, 7.143e+10,        0.
*Damping, beta=0.01
*Element, type=MASS, elset=_PickedSet15_Interia-1_MASS__
11, 11
*Mass, elset=_PickedSet15_Interia-1_MASS__, alpha=0.01
0.202,
*End Part
**
**
** ASSEMBLY
**
*Assembly, name=Assembly
**
*Instance, name=BEAMINSTANCE, part=BEAM-PART
*End Instance
**
*Nset, nset=FIX, instance=BEAMINSTANCE
 1,
*Nset, nset=OUTPUT-NODE, instance=BEAMINSTANCE, generate
  1,  11,   1
*End Assembly
*Amplitude, name=RVZ
             0., 0.0698131700797732,           0.001, 0.139626340159546,           0.002, 0.20943951023932,           0.003, 0.279252680319093
          0.004, 0.349065850398866,           0.005, 0.418879020478639,           0.006, 0.488692190558412,           0.007, 0.558505360638185
          0.008, 0.628318530717959,           0.009, 0.698131700797732,            0.01, 0.767944870877505,           0.011, 0.837758040957278
          0.012, 0.907571211037052,           0.013, 0.977384381116825,           0.014, 1.0471975511966,           0.015, 1.11701072127637
          0.016, 1.18682389135614,           0.017, 1.25663706143592,           0.018, 1.32645023151569,           0.019, 1.39626340159546
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          0.296, 20.7345115136926,           0.297, 20.8043246837724,           0.298, 20.8741378538522,           0.299, 20.943951023932
*Amplitude, name=VX
             0., -4.87387871559756e-07,           0.001, -3.8991029606007e-06,           0.002, -1.31594723183212e-05,           0.003, -3.11928221645052e-05
          0.004, -6.09234762246943e-05,           0.005, -0.000105275752570814,           0.006, -0.000167173958466409,           0.007, -0.000249542382717642
          0.008, -0.000355305285031224,           0.009, -0.000487386881880431,            0.01, -0.000648711328380416,           0.011, -0.000842202695674
          0.012, -0.00107078494332919,           0.013, -0.00133738188624972,           0.014, -0.00164491715559986,           0.015, -0.00199631415324506
          0.016, -0.00239449599920974,           0.017, -0.00284238547165393,           0.018, -0.00334290493887051,           0.019, -0.00389897628280486
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          0.296, -0.259085920171253,           0.297, -0.173658480872119,           0.298, -0.0872852948616004,           0.299, -5.12978851659144e-16
*Amplitude, name=VY
             0., 0.0139626340074481,           0.001, 0.0279252677597005,           0.002, 0.0418878999807788,           0.003, 0.0558505273531391
          0.004, 0.0698131434968902,           0.005, 0.0837757379490129,           0.006, 0.0977382951425837,           0.007, 0.111700793386004
          0.008, 0.125663203842244,           0.009, 0.139625489508101,            0.01, 0.153587604193487,           0.011, 0.167549491500758
          0.012, 0.18151108380409,           0.013, 0.195472301228934,           0.014, 0.20943305063155,           0.015, 0.22339322457867
          0.016, 0.237352700327296,           0.017, 0.251311338804684,           0.018, 0.265268983588528,           0.019, 0.279225459887424
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          0.296, -4.13880093679644,           0.297, -4.15723943909105,           0.298, -4.17391501146896,           0.299, -4.18879020478639
** ----------------------------------------------------------------
**
** STEP: Step-1
**
*Step, name=Step-1, nlgeom=YES, inc=100000
*Dynamic,alpha=-0.05,direct
0.001,0.3,
**
** BOUNDARY CONDITIONS
**
** Name: Vel-BC-1 Type: 速度/角速度
*Boundary, amplitude=VX, type=VELOCITY
FIX, 1, 1, 1.
** Name: Vel-BC-2 Type: 速度/角速度
*Boundary, amplitude=VY, type=VELOCITY
FIX, 2, 2, 1.
** Name: Vel-BC-3 Type: 速度/角速度
*Boundary, type=VELOCITY
FIX, 3, 3
** Name: Vel-BC-4 Type: 速度/角速度
*Boundary, type=VELOCITY
FIX, 4, 4
** Name: Vel-BC-5 Type: 速度/角速度
*Boundary, type=VELOCITY
FIX, 5, 5
** Name: Vel-BC-6 Type: 速度/角速度
*Boundary, amplitude=RVZ, type=VELOCITY
FIX, 6, 6, 1.
**
** OUTPUT REQUESTS
**
*Restart, write, frequency=0
**
** FIELD OUTPUT: F-Output-1
**
*Output, field, frequency=1
*Node Output, nset=OUTPUT-NODE
A, U, V
**
** HISTORY OUTPUT: H-Output-1
**
*Output, history, frequency=1
*Node Output, nset=OUTPUT-NODE
A1, A2, A3, AR1, AR2, AR3, U1, U2
U3, UR1, UR2, UR3, V1, V2, V3, VR1
VR2, VR3
*End Step
